solve block
    # guess values
    VAX := READPRN("C:\Users\Anhthu99_ss\Downloads\test.LIB")
    Fmax := VAX[:, 1]
    Vvar := VAX[:, 0]
    Lk := 10^-3
    Ck := 10^-10
    Pi := 3.14
    Fr := Fmax[:, 0]
    Cd := (Ck*Lk - 1/(4*Fr^2*Pi^2))/Lk
    Cd := Cd*(-1)
    M := 0.5
    VJO := 0.6
    CJO := 10^-12
    U := -10, -8 .. 0
    Cd(U) := CJO*(1 - U/VJO)^(-M)
    M := 0.5
    VJO := 0.6
    CJO := 10^-12
    # constraints
    2.397*10^-13 == CJO*(1 - (-10/VJO))^(-M)
    4.804*10^-13 == CJO*(1 - (-2/VJO))^(-M)
    3.612*10^-13 == CJO*(1 - (-4/VJO))^(-M)
    3.015*10^-13 == CJO*(1 - (-6/VJO))^(-M)
    # solver
    Find(CJO, VJO, M) =  # error: Unknown error: exp%_too%_large.
    Fmax = [468319; 474919; 478142; 480187; 481676; 482831; 483765; 484521; 485187; 485765; 486254; 486721; 487121; 487476; 487810; 487988]
    Vvar = [1; 3; 5; 7; 9; 11; 13; 15; 17; 19; 21; 23; 25; 27; 29; 30]
    # [plot: Fmax vs Vvar]
    # [plot: Cd vs Vvar]
    # [plot: Cd(U) vs U]
    Cd(U) = [2.37915e-13; 2.64135e-13; 3.01511e-13; 3.61158e-13; 4.80384e-13; 1e-12]
    U = [-10; -8; -6; -4; -2; 0]
    Given
    P := Minerr(CJO, VJO, M)  # error: This variable is undefined. Check that the label is set correctly.
end solve block
