solve block
    # guess values
    M := 0.5
    CJO := 10^-12
    VJ := 0.6
    # constraints
    CJO*(1 - (-10/VJ))^(-M) == 2.379*10^-13
    CJO*(1 - (-2/VJ))^(-M) == 4.804*10^-14
    CJO*(1 - (-4/VJ))^(-M) == -3.612*10^-13
    CJO*(1 - (-4/VJ))^(-M) == -3.612*10^-13
    # solver
    Find(CJO, M, VJ) = [1.30448e-12; 0.597259; -0.0289461]
    Given
end solve block
