solve block
    # guess values
    VAX := READPRN("C:\MC12demo\text.txt")
    Id3 := max(VAX[:, 1])
    nMax := match(Id3, VAX[:, 1])
    Rb := 1
    IS := 5.812*10^-12
    m := 2
    Ft := 0.026
    # constraints
    0.116 == 1.196*10^-7*Rb + ln((IS + 1.196*10^-7)/IS)*m*Ft
    0.484 == 3.681*10^-5*Rb + ln((IS + 3.681*10^-5)/IS)*m*Ft
    0.587 == 0.002*Rb + ln((IS + 0.002)/IS)*m*Ft
    0.598 == 0.003*Rb + ln((IS + 0.003)/IS)*m*Ft
    # solver
    Diod := Minerr(IS, Rb, m, Ft)
    # [plot: VAX[:, 1] vs VAX[:, 0]]
    VAX = [
        -0.136981, -1.06023e-7;
        -0.487553, -8.73481e-8;
        -0.784559, -5.64814e-8;
        -0.962123, -2.56809e-8;
        -0.993212, 1.15474e-8;
        -0.873093, 4.34573e-8;
        -0.620054, 7.6386e-8;
        -0.272618, 9.91344e-8;
        0.11632, 1.19641e-7;
        0.483844, 3.68082e-5
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    ]
    Id3 = 0.00390811
    nMax = [
        11; 12; 13; 30; 31; 32; 48; 49; 50; 70
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    ]
    Given
    Diod = [2.00329e-8; -55.797; 1.69575; 0.0370632]
end solve block
