# Worksheet setting: ORIGIN = 1
solve block
    # guess values
    Rb := 1
    N := 1
    Ft := 0.0255
    Io := 10^-14
    F(Id) := Id*Rb + N*Ft*ln((Id + Io)/Io)
    # constraints
    0.708 == 0.04*Rb + N*Ft*ln((0.04 + Io)/Io)
    0.758 == 0.15*Rb + N*Ft*ln((0.15 + Io)/Io)
    0.798 == 0.303*Rb + N*Ft*ln((0.303 + Io)/Io)
    0.855 == 0.578*Rb + N*Ft*ln((0.578 + Io)/Io)
    # solver
    Diod_P := minerr(Rb, Io, N, Ft)
    [0.708, 0.04; 0.758, 0.15; 0.798, 0.303; 0.855, 0.578]
    Given
    Diod_P = [0.146614; 4.26742e-14; 1.30458; 0.0195252]
    Rb := 0.147
    Io := 4.267*10^-14
    N := 1.305
    Ft := 0.02
    Ud(Id) := Id*Rb + N*Ft*ln((Id + Io)/Io)
    # [plot: Id vs Ud(Id)]
end solve block
