solve block
    # guess values
    Fmax := [420815.5; 430345.4; 435832.5; 437487.6; 438592.4]
    Vvar := [0; -3; -6; -9; -12]
    Lk := 10^-3
    Ck := 10^-10
    Pi := 3.14
    Fr := Fmax[:, 0]
    Cd := (Ck*Lk - 1/(4*Fr^2*Pi^2))/Lk
    Cd := Cd*(-1)
    M := 0.7998
    CJO := 1.932*10^-12
    VJ := 0.3095
    # [plot: Fmax[:, 0] vs Vvar[:, 0]]
    # [plot: Cd vs Vvar[:, 0]]
    Guess
end solve block
