solve block
    # guess values
    M := 0.54
    CJO := 2.35*10^-11
    VJ := 0.68
    # constraints
    CJO*[1 - (-3/VJ)]^(-M) == 3.741*10^-11
    CJO*[1 - (-6/VJ)]^(-M) == 3.572*10^-11
    CJO*[1 - (-12/VJ)]^(-M) == 3.204*10^-11
    CJO*[1 - (-6/VJ)]^(-M) == 3.226*10^-11
    # solver
    Find(CJO, M, VJ) = [1.96433e-10; 0.113846; 1.32167e-6]
    Guess
    Given
end solve block
