solve block
    # guess values
    Rk := 510
    Ek := 5
    Uvx := 5
    Uke := 0.2
    beta := 100
    Iknas := (Ek - Uke)/Rk = 0.00941176
    Ibnas := Iknas/beta = 9.41176e-5
    Rb1 := (Uvx - 0.75)/Ibnas = 45156.3
    Rb2 := (Uvx - 0.75)/(2*Ibnas) = 22578.1
    Rb3 := (Uvx - 0.75)/(5*Ibnas) = 9031.25
    Rb4 := (Uvx - 0.75)/(2*Ibnas) = 22578.1
end solve block
