solve block
    # guess values
    U := 5
    Ik := 20*10^-3
    Ek := 10
    Ib := Ik/220 = 9.09091e-5
    Rk := (Ek - U)/Ik = 250
    Rb := (Ek - 0.75)/Ib = 101750
    Id := 10*Ib = 0.000909091
end solve block
